*Heading
** Job name: U-Girder-Frequency Model name: U-Girder
** Generated by: Abaqus/CAE Student Edition 6.14-2
*Preprint, echo=NO, model=NO, history=NO, contact=NO
**
** PARTS
**
*Part, name=U-Girder
*Node
      1,       -94.25,          98.,        3300.
      2,        94.25,          98.,        3300.
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*Element, type=S4
 1,   1,   2,  21, 158
 2, 158,  21,  22, 157
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*Nset, nset=_PickedSet2, internal
   1,   2,   3,   4,   5,   6
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*Elset, elset=_PickedSet2, internal
  71,  72,  73,  74,  75,  76
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*Nset, nset=_PickedSet3, internal
   5,   6,   7,   8,   9,  10
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*Elset, elset=_PickedSet3, internal
 141, 142, 143, 144, 145, 146
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*Nset, nset=_PickedSet4, internal
   7,   8,   9,  10, 228, 229
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*Elset, elset=_PickedSet4, internal, generate
 211,  350,    1
*Nset, nset=_PickedSet5, internal
   1,   2,   3,   4,  21,  22
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*Elset, elset=_PickedSet5, internal, generate
  1,  70,   1
** Section: flat
*Shell Section, elset=_PickedSet5, material=steel
4., 5
** Section: square
*Shell Section, elset=_PickedSet2, material=steel
4., 5
** Section: flange
*Shell Section, elset=_PickedSet3, material=steel
11.5, 5
** Section: web
*Shell Section, elset=_PickedSet4, material=steel
8.5, 5
*End Part
**
**
** ASSEMBLY
**
*Assembly, name=Assembly
**
*Instance, name=U-Girder, part=U-Girder
*End Instance
**
*Nset, nset=_G3, internal, instance=U-Girder
   7,   8,   9,  10, 297, 367
*Elset, elset=_G3, internal, instance=U-Girder
 211, 212, 349, 350
*Nset, nset=_G4, internal, instance=U-Girder
 8,
*End Assembly
**
** MATERIALS
**
*Material, name=steel
*Density
 7.84e-06,
*Elastic
210000., 0.3
** ----------------------------------------------------------------
**
** STEP: Frequency
**
*Step, name=Frequency, nlgeom=NO, perturbation
*Frequency, eigensolver=subspace, normalization=displacement
20, , , 28, 30
**
** BOUNDARY CONDITIONS
**
** Name: rigid body modes Type: Displacement/Rotation
*Boundary
_G4, 1, 1
_G4, 3, 3
_G4, 5, 5
** Name: vertical support Type: Displacement/Rotation
*Boundary
_G3, 2, 2
**
** OUTPUT REQUESTS
**
*Restart, write, frequency=0
**
** FIELD OUTPUT: F-Output-1
**
*Output, field, variable=PRESELECT
*End Step
